<Lems>
    <!-- 1. Define Dimensions so OSB knows what is Voltage vs Current -->
    <Dimension name="voltage" m="1" l="2" t="-3" i="-1"/>
    <Dimension name="current" i="1"/>
    <Dimension name="time" t="1"/>

    <ComponentType name="ZnOMemristor" extends="baseSynapse" description="ZnO RRAM Frequency-Locked Switch">
        <Parameter name="a1" dimension="none"/>
        <Parameter name="a2" dimension="none"/>
        <Parameter name="b" dimension="none"/>
        <Parameter name="alpha" dimension="none"/>
        <Parameter name="beta" dimension="none"/>
        <Parameter name="tau" dimension="time"/>
        <Parameter name="xo" dimension="none"/>

        <!-- 2. Exposure allows OSB to 'plot' these values -->
        <Exposure name="i" dimension="current"/>
        <Exposure name="xsv" dimension="none"/>

        <!-- Requirement for 'baseSynapse' in LEMS -->
        <Requirement name="v" dimension="voltage"/>

        <Dynamics>
            <!-- 3. Initialize the state variable with your xo parameter -->
            <StateVariable name="xsv" dimension="none" exposure="xsv"/>

            <OnStart>
                <StateAssignment variable="xsv" value="xo"/>
            </OnStart>

            <!-- Maxwell-Wagner Integration -->
            <TimeDerivative variable="xsv" value="alpha * sinh(beta * v) - (xsv / tau)"/>

            <!-- Current Relationship with Schottky logic -->
            <DerivedVariable name="i" exposure="i" dimension="current" value="(v >= 0) ?
                ((xsv > 0.65 ? 1 : -1) * a1 * xsv * (1 - exp(-b * v))) :
                (a2 * xsv * (1 - exp(b * v)))"/>
        </Dynamics>
    </ComponentType>
</Lems>
